DataStore
  ExcelInput: FileNames=[obs\Observed.xlsx]; SheetNames=[Observed]
  ExcelInput DailyObserved: FileNames=[obs\DailyObserved.xlsx]; SheetNames=[DailyObserved]
  PredictedObserved: PredictedTableName=HarvestReport; ObservedTableName=Observed; FieldNameUsedForMatch=Stage; AllColumns=false
  PredictedObserved DailyPredictedObserved: PredictedTableName=DailyReport; ObservedTableName=DailyObserved; FieldNameUsedForMatch=Date; AllColumns=false
  Probability: TableName=BugeseraSensibility; Exceedence=false; FieldToSplitOn=SimulationName
  Probability WaterByNProbability: TableName=WaterByNSensibilityReport; Exceedence=false; FieldToSplitOn=SimulationName
  Input OldApsimFixed: FileNames=[old\combined_fixed.csv]
    Memo
      Daily outputs from the old apsim test set using fixed/static tillering (via fertile tiller number supplied in the sowing rule).
  Input OldApsimDynamic: FileNames=[old\combined_dynamic.csv]
    Memo
      Daily outputs from the old apsim test set using dynamic tillering.
  Input Multiyear_HE1_T1: FileNames=[old\multiyear_he1_t1.out]
