Report DailyReport: EventNames=[Clock].DoReport
  VariableNames:
    [Clock].Today.Date as Date
    [Clock].Today.Year as Year
    [Clock].Today.DayOfYear as DoY
    // Biomass
    [Plant].AboveGround.Wt as BiomassWt
    [Plant].Grain.Live.Wt as GrainGreenWt
    // StemLeafWt
    [Plant].Stem.Live.Wt as StemGreenWt
    [Plant].Leaf.Live.Wt as LeafGreenWt
    // Grain
    [Plant].Grain.NumberFunction as GrainNo
    [Plant].Grain.Live.NConc * 100 as GrainGreenNConc
    // LAI
    [Leaf].LAI as LAI
    // LeafNo
    [Leaf].LeafNo as LeafNo
    // Stage
    [Plant].Phenology.Stage as Stage
    // BiomassN
    [Plant].AboveGround.N as BiomassN
    [Plant].Grain.Live.N as GrainGreenN
    // StemLeafN
    [Plant].Stem.Live.N as StemGreenN
    [Plant].Leaf.Live.N as LeafGreenN
    // SLN
    sum([Soil].Nutrient.NO3.kgha) as NO3
    ([Leaf].LAI / ([Leaf].Live.N + 0.000001)) as SLN
