Soil: SoilType=Nicollet; LocalName=SoilAmesCorn; NearestTown=Ames; Region=Boone; State=Iowa; Country=US; ApsoilNumber=34; Latitude=42.02204; Longitude=-93.769115; DataSource=measured data and web soil survey; Comments=hydrological parameters and BD from Saxton and Rawls, 2006
  Physical
    Thickness  BD    AirDry  LL15   DUL    SAT    KS
    25         1.25  0.135   0.174  0.31   0.445  151
    25         1.25  0.135   0.174  0.31   0.455  128
    50         1.25  0.15    0.174  0.3    0.42   239
    100        1.25  0.165   0.165  0.25   0.43   158
    100        1.25  0.12    0.12   0.22   0.35   144
    150        1.35  0.11    0.11   0.21   0.34   115
    150        1.35  0.102   0.102  0.22   0.33   103
    150        1.36  0.126   0.126  0.265  0.393  182
    150        1.36  0.133   0.133  0.261  0.364  168
    150        1.36  0.128   0.128  0.253  0.335  159
    150        1.4   0.128   0.128  0.2    0.37   2
    300        1.4   0.09    0.09   0.28   0.332  2
    300        1.4   0.09    0.09   0.18   0.242  2
    300        1.4   0.09    0.09   0.2    0.256  2
    400        1.4   0.09    0.09   0.191  0.234  2
    SoilCrop SoybeanSoil
      LL=[0.174, 0.174, 0.174, 0.165, 0.12, 0.11, 0.102, 0.126, 0.133, 0.128, 0.128, 0.09, 0.09, 0.09, 0.09]
      KL=[0.08, 0.08, 0.08, 0.08, 0.08, 0.08, 0.07, 0.06, 0.06, 0.04, 0.01, 0.01, 0.01, 0, 0]
      XF=[1, 1, 1, 1, 1, 1, 1, 1, 1, 1, 1, 1, 0.5, 0, 0]
  Organic: FOMCNRatio=46
    Thickness  Carbon  SoilCNRatio  FBiom  FInert  FOM
    25         2.43    12.5         0.191  0.4     483.114
    25         2.34    12.5         0.164  0.4     468.836
    50         2.44    12.5         0.162  0.4     441.533
    100        2.37    12.5         0.055  0.441   391.605
    100        1.98    12.5         0.017  0.52    347.322
    150        1.95    12.5         0.018  0.619   290.108
    150        0.97    12.5         0.034  0.738   242.318
    150        0.98    12.5         0.04   0.802   202.401
    150        0.49    12.5         0.061  0.797   169.06
    150        0.49    12.5         0.053  0.798   141.211
    150        0.49    12.5         0.011  0.808   117.949
    300        0.49    12.5         0.01   0.857   82.2903
    300        0.49    12.5         0.012  0.95    57.412
    300        0.49    12.5         0.016  0.99    40.055
    400        0.49    12.5         0.01   0.99    24.7854
  Chemical
    Thickness  NO3N       NH4N       PH
    25         4.7        8.8        7.48
    25         5          14.7       7.48
    50         3.5        2.9        7.48
    100        4.4        3.7        7.38
    100        5.1        2.19       7.43
    150        3.9        1.35       7.43
    150        2.9        0.84       7.73
    150        1.7        0.735294   7.73
    150        0.539216   0.735294   8.08
    150        0.441176   0.0490196  8.08
    150        0.380952   0.0952381  8.08
    300        0.261905   0.0714286  8.08
    300        0.119048   0.0952381  8.08
    300        0.0952381  0          8.08
    400        0          0          8.08
  Sample Initial nitrogen: SWUnits=Volumetric; OCUnits=Total; PHUnits=Water
    Thickness=[25, 25, 50, 100, 100, 150, 150, 150, 150, 150, 150, 300, 300, 300, 400]
    SW=[0.31, 0.31, 0.32, 0.25, 0.327, 0.304, 0.298, 0.285, 0.364, 0.335, 0.37, 0.332, 0.242, 0.256, 0.234]
  WaterBalance SoilWater: SummerDate=1-Nov; SummerU=6; SummerCona=3.5; WinterDate=1-Apr; WinterU=6; WinterCona=3.5; DiffusConst=88; DiffusSlope=35.4; Salb=0.2; CN2Bare=85; CNRed=20; CNCov=0.8; DischargeWidth=0; CatchmentArea=0; Thickness=[150, 150, 150, 150, 150, 150, 300, 300, 1000]; SWCON=[0.7, 0.7, 0.7, 0.7, 0.7, 0.7, 0.2, 0.2, 0.2]
  CERESSoilTemperature Temperature
  Nutrient
