Soil: SoilType=HMM; Site=HRS; NearestTown=Unknown; Region=SE Queensland; NaturalVegetation=Unknown; Latitude=0; Longitude=0
  Physical
    Thickness  BD    AirDry  LL15   DUL   SAT
    100        1.34  0.08    0.226  0.42  0.45
    100        1.34  0.19    0.226  0.42  0.45
    200        1.33  0.23    0.258  0.46  0.48
    200        1.38  0.26    0.27   0.46  0.47
    200        1.4   0.26    0.268  0.43  0.45
    200        1.55  0.28    0.304  0.4   0.41
    200        1.59  0.25    0.335  0.37  0.38
    200        1.63  0.28    0.33   0.33  0.37
    200        1.66  0.3     0.32   0.32  0.37
    200        1.68  0.31    0.33   0.33  0.36
    SoilCrop SorghumSoil
      LL=[0.226, 0.226, 0.258, 0.27, 0.268, 0.304, 0.335, 0.33, 0.32, 0.33]
      KL=[0.07, 0.07, 0.07, 0.07, 0.06, 0.06, 0.06, 0.05, 0.05, 0.04]
      XF=[1, 1, 1, 1, 1, 1, 1, 1, 1, 1]
    SoilCrop MaizeSoil
      LL=[0.226, 0.226, 0.258, 0.27, 0.268, 0.304, 0.335, 0.33, 0.32, 0.33]
      KL=[0.07, 0.07, 0.07, 0.07, 0.06, 0.06, 0.06, 0.05, 0.05, 0.04]
      XF=[1, 1, 1, 1, 1, 1, 1, 1, 1, 1]
  WaterBalance SoilWater: SummerDate=1-Nov; SummerU=1.5; SummerCona=6.5; WinterDate=1-Apr; WinterU=1.5; WinterCona=6.5; DiffusConst=40; DiffusSlope=16; Salb=0.2; CN2Bare=85; CNRed=20; CNCov=0.8; Thickness=[100, 100, 200, 200, 200, 200, 200, 200, 200, 200]; SWCON=[0.3, 0.3, 0.3, 0.3, 0.3, 0.3, 0.3, 0.3, 0.3, 0.3]
  SoilNitrogen: fom_types=[default, manure, mucuna, lablab, shemp, stable]; fract_carb=[0.2, 0.3, 0.54, 0.57, 0.45, 0]; fract_cell=[0.7, 0.3, 0.37, 0.37, 0.47, 0.1]; fract_lign=[0.1, 0.4, 0.09, 0.06, 0.08, 0.9]; NPartitionApproach=0
    SoilNitrogenNO3 NO3
    SoilNitrogenNH4 NH4
    SoilNitrogenUrea Urea
    SoilNitrogenPlantAvailableNO3 PlantAvailableNO3
    SoilNitrogenPlantAvailableNH4 PlantAvailableNH4
  Organic: FOMCNRatio=50
    Thickness  Carbon  SoilCNRatio  FBiom  FInert  FOM
    100        1.19    12.5         0.05   0.45    260.587
    100        0.59    12.5         0.02   0.6     220.582
    200        0.45    12.5         0.01   0.75    158.054
    200        0.3     12.5         0.01   0.9     113.251
    200        0.2     12.5         0.01   0.9     81.1478
    200        0.16    12.5         0.01   0.9     58.1449
    200        0.17    12.5         0.01   0.9     41.6626
    200        0.17    12.5         0.05   0.9     29.8526
    200        0.17    12.5         0.02   0.9     21.3903
    200        0.17    12.5         0.01   0.9     15.3268
  Chemical
    Thickness  NO3N   NH4N  PH
    100        10.4   0.1   6.3
    100        1.633  0.1   6.4
    200        1.233  0.1   6.5
    200        0.9    0.1   6.6
    200        1.1    0.1   6.6
    200        1.467  0.1   6.5
    200        3.633  0.1   6.5
    200        5.667  0.1   6.5
    200        5.8    0.1   6.5
    200        7.267  0.1   6.5
  Sample Initial water: Thickness=[100, 100, 200, 200, 200, 200, 200, 200, 200, 200]; SWUnits=Volumetric; OCUnits=Total; PHUnits=Water
    SW=[0.235, 0.252, 0.27, 0.3, 0.268, 0.304, 0.335, 0.33, 0.32, 0.33]
  CERESSoilTemperature Temperature
