Folder Validation
  Folder Combined Results
    Memo Combined Results
      Simulation results for the combined datasets from the various countries are shown in the following graphs.  The model is able to adequately capture the influence of growing conditions (soil, climate) and management (population, Nitrogen, irrigation, sowing date).
  Memo fixme
    Some data is missing from daily observed data:

    - slai
    - Leaf wt
    - water sd ratio

    Other problems:

    - Should yield be live or total wt?
    - Which observed variables are rachis variables?
    - Are predicted dm/N variables live or total? And are they aboveground or total?
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